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/COM,ANSYS RELEASE 2025 R1           BUILD 25.1      UP20241202       02:49:40
/PREP7
/TITLE,ANSYSwbpj_MA--Statisch-mechanisch (E5)
ANTYPE, 0
EQSLV,PCG , 1.000000000E-08,,
TOFFST,  273.150000
DMPOPT,ESAV,NO
DMPOPT,EMAT,NO
*IF,_CDRDOFF,EQ,1,THEN     !if solid model was read in
_CDRDOFF=             !reset flag, numoffs already performed
*ELSE              !offset database for the following FE model
NUMOFF,NODE,    16541
NUMOFF,ELEM,     8862
NUMOFF,MAT ,        2
NUMOFF,TYPE,        2
*ENDIF
*SET,TEMPERATURE,'TEMP                            '
*SET,_ASMDIAG, 0.7995188307949E-01
*SET,_DS_PROGRESS,  999.0000000000
*SET,_MAXELEMNUM,  8862.000000000
*SET,_MAXELEMTYPE,  2.000000000000
*SET,_MAXNODENUM,  16541.00000000
*SET,_NUMELEM,  8862.000000000
*SET,_NUMNODE,  16541.00000000
*SET,_RETURN ,  0.000000000000
*SET,_STATUS ,  1.000000000000
*SET,_THICKRATIO,  1.000000000000
*SET,_WALLBSOL,  2.827777777778
*SET,_WALLSTRT,  2.827777777778
*SET,_WB_PROJECTSCRATCH_DIR(1,       1,       1),'C:\Users\wacja\Desktop\Abschlussarbeit_Objekte\_ProjectScratch\Scr257D\                                                                                                                                                                                 '
*SET,_WB_SOLVERFILES_DIR(1,       1,       1),'C:\Users\wacja\Desktop\Abschlussarbeit_Objekte\ANSYSwbpj_MA_files\dp0\SYS-4\MECH\                                                                                                                                                                       '
*SET,_WB_USERFILES_DIR(1,       1,       1),'C:\Users\wacja\Desktop\Abschlussarbeit_Objekte\ANSYSwbpj_MA_files\user_files\                                                                                                                                                                           '
*SET,_XMAX   , 0.3931814432000
*SET,_XMIN   , 0.3256681859000
*SET,_YMAX   ,  1.364119053000
*SET,_YMIN   ,  1.352751613000
*SET,_ZMAX   , 0.8630432487000
*SET,_ZMIN   , 0.8217510581000
DOF,DELETE
ETBLOCK,        2,        2
(2i9,19a9)
        1      187        0        0        0        0        0        0        0        0        0        0        0        0        0        0        0        0        0        0        0
        2      187        0        0        0        0        0        0        0        0        0        0        0        0        0        0        0        0        0        0        0
       -1
NBLOCK,6,SOLID,     16541,     16541
(3i9,6e21.13e3)
        1        0        0 3.6752992870000E-001 1.3598440890000E+000 8.3452570440000E-001
        2        0        0 3.6663779620000E-001 1.3596404790000E+000 8.3280009030000E-001
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N,UNBL,LOC,       -1,
EBLOCK,19,SOLID,      8862,      8862
(19i10)
         1         1         1         1         0         0         0         0        10         0         1       231      1035      1499      1429      3159      7743      3162      3161
      7741      9060
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        -1
MPTEMP,UNBL, 1, 1,  0.00000000    ,
MPDATA,UNBL, 1,EX  ,       1, 1, 2.000000000E+11,
MPTEMP,UNBL, 1, 1,  0.00000000    ,
MPDATA,UNBL, 1,NUXY,       1, 1, 0.300000000    ,
MPTEMP,UNBL, 1, 1,  0.00000000    ,
MPDATA,UNBL, 1,ALPX,       1, 1, 1.200000000E-05,
MPTEMP,UNBL, 1, 1,  0.00000000    ,
MPDATA,UNBL, 1,DENS,       1, 1,  7850.00000    ,
MPTEMP,UNBL, 1, 1,  0.00000000    ,
MPDATA,UNBL, 1,KXX ,       1, 1,  60.5000000    ,
MPTEMP,UNBL, 1, 1,  0.00000000    ,
MPDATA,UNBL, 1,RSVX,       1, 1, 1.700000000E-07,
MPTEMP,UNBL, 1, 1,  0.00000000    ,
MPDATA,UNBL, 1,C   ,       1, 1,  434.000000    ,
MPTEMP,UNBL, 1, 1,  0.00000000    ,
MPDATA,UNBL, 1,MURX,       1, 1,  10000.0000    ,
MPTEMP,UNBL,16, 1,  1.00000000    ,  2.00000000    ,  3.00000000
MPTEMP,UNBL,16, 4,  4.00000000    ,  5.00000000    ,  6.00000000
MPTEMP,UNBL,16, 7,  7.00000000    ,  8.00000000    ,  9.00000000
MPTEMP,UNBL,16,10,  10.0000000    ,  11.0000000    ,  12.0000000
MPTEMP,UNBL,16,13,  13.0000000    ,  14.0000000    ,  15.0000000
MPTEMP,UNBL,16,16,  16.0000000    ,
MPDATA,UNBL,16,UMID,       1, 1, 892940336.0    , 845231929.0    , 758591843.0
MPDATA,UNBL,16,UMID,       1, 4, 841823282.0    , 946154809.0    , 808870445.0
MPDATA,UNBL,16,UMID,       1, 7, 892691511.0    , 1684170085.    , 825241701.0
MPDATA,UNBL,16,UMID,       1,10, 538976288.0    , 538976288.0    , 538976288.0
MPDATA,UNBL,16,UMID,       1,13, 538976288.0    , 538976288.0    , 538976288.0
MPDATA,UNBL,16,UMID,       1,16, 538976288.0    ,
MPTEMP,UNBL,16, 1,  1.00000000    ,  2.00000000    ,  3.00000000
MPTEMP,UNBL,16, 4,  4.00000000    ,  5.00000000    ,  6.00000000
MPTEMP,UNBL,16, 7,  7.00000000    ,  8.00000000    ,  9.00000000
MPTEMP,UNBL,16,10,  10.0000000    ,  11.0000000    ,  12.0000000
MPTEMP,UNBL,16,13,  13.0000000    ,  14.0000000    ,  15.0000000
MPTEMP,UNBL,16,16,  16.0000000    ,
MPDATA,UNBL,16,UVID,       1, 1, 842359142.0    , 859256422.0    , 758605362.0
MPDATA,UNBL,16,UVID,       1, 4, 925709361.0    , 1697787193.    , 875575597.0
MPDATA,UNBL,16,UVID,       1, 7, 892757345.0    , 1650668595.    , 1697866544.
MPDATA,UNBL,16,UVID,       1,10, 538976288.0    , 538976288.0    , 538976288.0
MPDATA,UNBL,16,UVID,       1,13, 538976288.0    , 538976288.0    , 538976288.0
MPDATA,UNBL,16,UVID,       1,16, 538976288.0    ,
MPTEMP,UNBL, 1, 1,  0.00000000    ,
MPDATA,UNBL, 1,EX  ,       2, 1, 2.000000000E+11,
MPTEMP,UNBL, 1, 1,  0.00000000    ,
MPDATA,UNBL, 1,NUXY,       2, 1, 0.300000000    ,
MPTEMP,UNBL, 1, 1,  0.00000000    ,
MPDATA,UNBL, 1,ALPX,       2, 1, 1.200000000E-05,
MPTEMP,UNBL, 1, 1,  0.00000000    ,
MPDATA,UNBL, 1,DENS,       2, 1,  7850.00000    ,
MPTEMP,UNBL, 1, 1,  0.00000000    ,
MPDATA,UNBL, 1,KXX ,       2, 1,  60.5000000    ,
MPTEMP,UNBL, 1, 1,  0.00000000    ,
MPDATA,UNBL, 1,RSVX,       2, 1, 1.700000000E-07,
MPTEMP,UNBL, 1, 1,  0.00000000    ,
MPDATA,UNBL, 1,C   ,       2, 1,  434.000000    ,
MPTEMP,UNBL, 1, 1,  0.00000000    ,
MPDATA,UNBL, 1,MURX,       2, 1,  10000.0000    ,
MPTEMP,UNBL,16, 1,  1.00000000    ,  2.00000000    ,  3.00000000
MPTEMP,UNBL,16, 4,  4.00000000    ,  5.00000000    ,  6.00000000
MPTEMP,UNBL,16, 7,  7.00000000    ,  8.00000000    ,  9.00000000
MPTEMP,UNBL,16,10,  10.0000000    ,  11.0000000    ,  12.0000000
MPTEMP,UNBL,16,13,  13.0000000    ,  14.0000000    ,  15.0000000
MPTEMP,UNBL,16,16,  16.0000000    ,
MPDATA,UNBL,16,UMID,       2, 1, 892940336.0    , 845231929.0    , 758591843.0
MPDATA,UNBL,16,UMID,       2, 4, 841823282.0    , 946154809.0    , 808870445.0
MPDATA,UNBL,16,UMID,       2, 7, 892691511.0    , 1684170085.    , 825241701.0
MPDATA,UNBL,16,UMID,       2,10, 538976288.0    , 538976288.0    , 538976288.0
MPDATA,UNBL,16,UMID,       2,13, 538976288.0    , 538976288.0    , 538976288.0
MPDATA,UNBL,16,UMID,       2,16, 538976288.0    ,
MPTEMP,UNBL,16, 1,  1.00000000    ,  2.00000000    ,  3.00000000
MPTEMP,UNBL,16, 4,  4.00000000    ,  5.00000000    ,  6.00000000
MPTEMP,UNBL,16, 7,  7.00000000    ,  8.00000000    ,  9.00000000
MPTEMP,UNBL,16,10,  10.0000000    ,  11.0000000    ,  12.0000000
MPTEMP,UNBL,16,13,  13.0000000    ,  14.0000000    ,  15.0000000
MPTEMP,UNBL,16,16,  16.0000000    ,
MPDATA,UNBL,16,UVID,       2, 1, 842359142.0    , 859256422.0    , 758605362.0
MPDATA,UNBL,16,UVID,       2, 4, 925709361.0    , 1697787193.    , 875575597.0
MPDATA,UNBL,16,UVID,       2, 7, 892757345.0    , 1650668595.    , 1697866544.
MPDATA,UNBL,16,UVID,       2,10, 538976288.0    , 538976288.0    , 538976288.0
MPDATA,UNBL,16,UVID,       2,13, 538976288.0    , 538976288.0    , 538976288.0
MPDATA,UNBL,16,UVID,       2,16, 538976288.0    ,
EXTOPT,ATTR,      0,      0,      0
EXTOPT,ESIZE,  0,  0.0000
EXTOPT,ACLEAR,      0
TREF,  22.0000000
IRLF,  0
BFUNIF,TEMP,_TINY
ACEL,  0.00000000    ,  0.00000000    ,  0.00000000
OMEGA,  0.00000000    ,  0.00000000    ,  0.00000000
DOMEGA,  0.00000000    ,  0.00000000    ,  0.00000000
CGLOC,  0.00000000    ,  0.00000000    ,  0.00000000
CGOMEGA,  0.00000000    ,  0.00000000    ,  0.00000000
DCGOMG,  0.00000000    ,  0.00000000    ,  0.00000000
NLDIAG,EFLG,OFF
NLDIAG,NRRE,OFF
NLDIAG,CONT,ITER

NSUBST,         1,         1,         1,
KUSE,     0
TIME,  1.00000000
ALPHAD,  0.00000000
BETAD,  0.00000000
DMPRAT,  0.00000000
DMPSTR,  0.00000000

CRPLIM, 0.100000000    ,   0
CRPLIM,  0.00000000    ,   1
NCNV,     1,  0.00000000    ,     0,  0.00000000    ,  0.00000000
NEQIT,     0

ERESX,DEFA
OUTRES, ALL,NONE,
OUTRES,NSOL, ALL,
OUTRES,RSOL, ALL,
OUTRES,EANG, ALL,
OUTRES,ETMP, ALL,
OUTRES,VENG, ALL,
OUTRES,STRS, ALL,
OUTRES,EPEL, ALL,
OUTRES,EPPL, ALL,
OUTRES,CONT, ALL,
FINISH
